*Heading
** Job name: Job-2d-gravity-dam Model name: Model-2
** Generated by: Abaqus/CAE 2022
*Preprint, echo=NO, model=NO, history=NO, contact=NO
**
** PARTS
**
*Part, name=Part-1
*Node
      1,          30.,          70.
      2,          30.,           0.
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*Element, type=CPE3
  1, 148,   8,   9
  2, 118,   9,  10
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*Element, type=CPE4
368,   4,  66, 272,  93
369,  66,  67, 273, 272
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*Elset, elset=Set-elems, generate
   1,  575,    1
*Nset, nset=Set-nodes, generate
   1,  439,    1
*Nset, nset=Set-fixed-nodes
   2,   3,   7,  25,  26,  27
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*Nset, nset=Set-load1-nodes
   7, 103, 104, 105, 106, 107, 108, 109, 110
*Nset, nset=Set-load2-nodes, generate
  94,  102,    1
*Nset, nset=Set-load3-nodes
  4,  6, 87, 88, 89, 90, 91, 92, 93
** Section: Section-1
*Solid Section, elset=Set-elems, material=Material-1
200.,
*End Part
**
**
** ASSEMBLY
**
*Assembly, name=Assembly
**
*Instance, name=Part-1-1, part=Part-1
*End Instance
**
*End Assembly
**
** MATERIALS
**
*Material, name=Material-1
*Elastic
1000., 0.3
** ----------------------------------------------------------------
**
** STEP: Step-1
**
*Step, name=Step-1, nlgeom=NO, inc=10
*Static, direct
0.1, 1.,
**
** BOUNDARY CONDITIONS
**
** Name: BC-1 Type: Displacement/Rotation
*Boundary
Part-1-1.Set-fixed-nodes, 1, 1
Part-1-1.Set-fixed-nodes, 2, 2
**
** LOADS
**
** Name: Load-1   Type: Concentrated force
*Cload
Part-1-1.Set-load1-nodes, 1, 30.
** Name: Load-2   Type: Concentrated force
*Cload
Part-1-1.Set-load2-nodes, 1, 20.
** Name: Load-3   Type: Concentrated force
*Cload
Part-1-1.Set-load3-nodes, 1, 10.
**
** OUTPUT REQUESTS
**
*Restart, write, frequency=0
**
** FIELD OUTPUT: F-Output-1
**
*Output, field
*Node Output
CF, RF, U
*Element Output, directions=YES
E, S
*Output, history, frequency=0
*End Step
