*Heading
** Job name: Job-3d-torsion-beam Model name: Model-3
** Generated by: Abaqus/CAE 2022
*Preprint, echo=NO, model=NO, history=NO, contact=NO
**
** PARTS
**
*Part, name=Part-1
*Node
      1,          20.,          10.,         200.
      2,          20.,          45.,         200.
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*Element, type=C3D8
  1,  214, 1299, 2665, 1221,    1,   33,  753,  122
  2, 1299, 1300, 2666, 2665,   33,   34,  754,  753
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*Nset, nset=Set-nodes, generate
    1,  3444,     1
*Elset, elset=Set-elems, generate
    1,  2160,     1
*Nset, nset=Set-fixed-nodes
    3,    4,    6,    7,   10,   12
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*Nset, nset=Set-load1-nodes
  29,  32, 750
*Nset, nset=Set-load2-nodes
  19,  21, 524
** Section: Section-1
*Solid Section, elset=Set-elems, material=Material-1
,
*End Part
**
**
** ASSEMBLY
**
*Assembly, name=Assembly
**
*Instance, name=Part-1-1, part=Part-1
*End Instance
**
*End Assembly
**
** MATERIALS
**
*Material, name=Material-1
*Elastic
1000., 0.3
** ----------------------------------------------------------------
**
** STEP: Step-1
**
*Step, name=Step-1, nlgeom=NO, inc=10
*Static, direct
0.1, 1.,
**
** BOUNDARY CONDITIONS
**
** Name: BC-1 Type: Displacement/Rotation
*Boundary
Part-1-1.Set-fixed-nodes, 1, 1
Part-1-1.Set-fixed-nodes, 2, 2
Part-1-1.Set-fixed-nodes, 3, 3
**
** LOADS
**
** Name: Load-1   Type: Concentrated force
*Cload
Part-1-1.Set-load1-nodes, 1, -10.
** Name: Load-2   Type: Concentrated force
*Cload
Part-1-1.Set-load2-nodes, 1, 10.
**
** OUTPUT REQUESTS
**
*Restart, write, frequency=0
**
** FIELD OUTPUT: F-Output-1
**
*Output, field
*Node Output
CF, RF, U
**
** FIELD OUTPUT: F-Output-2
**
*Element Output, position=CENTROIDAL, directions=YES
S,
*Output, history, frequency=0
*End Step
