*Heading
** Job name: Job-2d-truss-structure Model name: Model-1
** Generated by: Abaqus/CAE 2022
*Preprint, echo=NO, model=NO, history=NO, contact=NO
**
** PARTS
**
*Part, name=Part-1
*Node
      1,         100.,          10.
      2,         100.,          20.
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*Element, type=T2D2
1, 1, 2
2, 3, 2
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*Nset, nset=Set-nodes, generate
  1,  33,   1
*Elset, elset=Set-elems, generate
  1,  72,   1
*Nset, nset=Set-fixed-nodes
 26, 27, 32
*Nset, nset=Set-load-node
 2,
** Section: Section-1
*Solid Section, elset=Set-elems, material=Material-1
5.,
*End Part
**
**
** ASSEMBLY
**
*Assembly, name=Assembly
**
*Instance, name=Part-1-1, part=Part-1
*End Instance
**
*End Assembly
**
** MATERIALS
**
*Material, name=Material-1
*Elastic
1000., 0.3
** ----------------------------------------------------------------
**
** STEP: Step-1
**
*Step, name=Step-1, nlgeom=NO, inc=10
*Static, direct
0.1, 1.,
**
** BOUNDARY CONDITIONS
**
** Name: BC-1 Type: Displacement/Rotation
*Boundary
Part-1-1.Set-fixed-nodes, 1, 1
Part-1-1.Set-fixed-nodes, 2, 2
**
** LOADS
**
** Name: Load-1   Type: Concentrated force
*Cload
Part-1-1.Set-load-node, 2, -5.
**
** OUTPUT REQUESTS
**
*Restart, write, frequency=0
**
** FIELD OUTPUT: F-Output-1
**
*Output, field
*Node Output
CF, RF, U
*Element Output, directions=YES
E, LE, S
*Output, history, frequency=0
*End Step
